<?xml version="1.0"?>
<!-- Generated by Aero-Matic v 0.8 - modified by Tat on 2008/02/12

     Inputs:
                horsepower: 950
                     pitch: variable
            max engine rpm: 2500
        prop diameter (ft): 9.5149

     Outputs:
              max prop rpm:1753.00
                gear ratio:1.426127
                       Cp0:0.158157
                       Ct0:0.067369
       static thrust (lbs):1120.86
Internal Parameters:
               cutoff_coef:   1.40
               power_ratio:   1.30
              thrust_ratio:   1.40
           min_power_ratio:   1.40
          min_thrust_ratio:   0.47
             max_curv_rate:   0.90
             min_curv_rate:   0.30
-->

<propeller name="CS-40B">
  <ixx>10.0322 </ixx>
  <diameter unit="IN">114.2 </diameter>
  <numblades> 3 </numblades>
  <gearratio>1.4545 </gearratio>
  <minpitch> 25 </minpitch>
  <maxpitch> 45 </maxpitch>
  <minrpm> 1254 </minrpm>
  <maxrpm> 1777 </maxrpm>
  <table name="C_THRUST" type="internal">
      <tableData>
                25       45
       0.0      0.0932   0.2963
       0.1      0.0932   0.2963
       0.2      0.0931   0.2952
       0.3      0.0930   0.2906
       0.4      0.0925   0.2857
       0.5      0.0920   0.2704
       0.6      0.0910   0.2648
       0.7      0.0905   0.2586
       0.8      0.0828   0.2420
       0.9      0.0700   0.2347
       1.0      0.0220   0.2265
       1.1      0.0005   0.2174
       1.2      0.0000   0.2070
       1.3      0.0000   0.2050
       1.4      0.0000   0.2037
       1.5      0.0000   0.2020
       1.6      0.0000   0.2015
       1.7      0.0000   0.2010
       1.73     0.0000   0.2000
       1.8      0.0000   0.0000
       1.9      0.0000   0.0000
     </tableData>
  </table>

  <table name="C_POWER" type="internal">
     <tableData>
                25       45
       0.0      0.1259   0.4274
       0.1      0.1258   0.4223
       0.2      0.1257   0.4218
       0.3      0.1255   0.4210
       0.4      0.1252   0.4208
       0.5      0.1248   0.4182
       0.6      0.1242   0.4140
       0.7      0.1240   0.4125
       0.8      0.1239   0.4112
       0.9      0.1236   0.4100
       1.0      0.1234   0.4093
       1.1      0.1200   0.3958
       1.2      0.0900   0.3707
       1.3      0.0900   0.3354
       1.4      0.0900   0.3273
       1.5      0.0900   0.3049
       1.6      0.0900   0.2900
       1.7      0.0900   0.2850
       1.73	0.0900   0.2750
       1.8      0.0900   0.0000
       1.9      0.0000   0.0000
     </tableData>
  </table>
</propeller>
